# Если необходимо построить "кривую разгона" простого объекта регулирования, то можно использовать преобразование Лапласа
# Задание параметров объекта регулирования
# Внимание!
# Преобразование Лапласа не "берет" более сложные передаточные функции! При попытке использовать более сложный объект управления  преобразование может не посчитаться, либо график полученной функции не будет соответствовать действительности!
k_μ := 3.2
T_1 := 7.3
τ := 2
# Передаточная функция объекта регулирования:
Wo(p) := k_μ*e^(-τ*p)/(T_1*p + 1)^2
# данная передаточная функция образуется путём перемножения простых динамических звеньев (рис. 1):
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# Рис 1. Получение передаточной функции объекта
# если необходимо изменить объект регулирования (для своих расчётов), необходимо просто добавить необходимое звено.
# используя
X(p) := 1/p  # оператор Лапласа, осуществляем обратное преобразование Лапласа:
y(t) := Wo(p)*X(p) invlaplace, p → -Φ(t - 2.0)*(2.32328767123*e^(0.27397260274 - 0.13698630137*t) + 0.438356164384*t*e^(0.27397260274 - 0.13698630137*t) - 3.2)
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# установившееся значение и есть коэффициент усиления объета регулирования k_μ
# Если необходимо построить "кривую разгона" объекта регулирования более сложной структуры, то необходимо использовать Фурье преобразование.
# Для эксперимента возьмём заданную передаточную функцию и (обязательно для Фурье-преобразования) перепишем её в частотном виде, заменив p на jω
# где
j := sqrt(-1)
# объект регулирования
W_object(ω) := k_μ*e^(-τ*j*ω)/(T_1*j*ω + 1)^2
# временной интервал, необходимый для построения "кривой разгона" (временной интервал должен отображать интервал за который "кривая разгона" примет устоновившееся значение)
t := 0, 0.2 .. 60
# подбираем частоту среза, на которой необходимо остановить вычисление преобразования (если выбрать слишком большую частоту, то MathCAD будет долго обсчитывать функцию). Данная частота определяется экспериментально. Если после определенного изменения частоты результат H_object(t) не изменяется, то необходимо принимать полученную частоту. Для большинства теплоэнергетических объектов частота среза равная 5 более чем достаточная. В нашем случае:
ω_end := 0.5
H_object(t) := 2*integral(sin(ω*t)*Re(W_object(ω))/ω, ω = 0 .. ω_end)/π
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# Проверка
# Если сравнить полученные результаты метода Фурье-преобразования и обратного преобразования Лапласа, то мы должны получить одни и те же графики. Построим соответствующий график ниже:
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# Кривые разгона наложились друг на друга, что доказывает, что мы произвели высичления и построения правильно.
# Добавляем регулятор
# Объект регулирования у нас есть, теперь необходимо научиться им управлять. Для этого необходимо взять ПИ-регулятор (одноконтурные системы с объектом регулирования, состоящим из последовательно соедененных А-звеньев обычно выбирают ПИ- или ПИД-регулятор)
# необходимо задаться начальными значениями регулятора, лучше всего Tu деалть как можно больше, Кр не больше 1.
Kp := 0.9
Tu := 15
# вместо Tu можно использовать Ku, но следует помнить, что Ku=Kp/Tu, поэтому, изменяя параметр настройки Kp будет меняться и Ku соответственно. В данном расчёте мы позже перейдём от Tu к Ku.
# Передаточная функция регулятора имеет вид:
W_p(ω) := Kp + Kp/(Tu*(j*ω))
# Т.к. одноконтурная система является замкнутной, т.е. имеется обратная связь, то при возмущении по каналу регулирующего органа (λ=1) передаточная функция замкунтой системы (zs) будет иметь вид:
W_zsλ(ω) := W_object(ω)/(1 + W_object(ω)*W_p(ω))
# Если же возмущение поступает в систему по каналу задания, то формула изменит свой вид:
W_zsυ(ω) := W_object(ω)*W_p(ω)/(1 + W_object(ω)*W_p(ω))
# Если построить переходный процесс для возмущения по каналу регулирующего органа, то получим следую
# формула для расчёта переходного
# процесса по каналу регулирующего органа
H_zsλ(t) := 2*integral(sin(ω*t)*Re(W_zsλ(ω))/ω, ω = 0 .. ω_end)/π
# формула для расчёта переходного
# процесса по каналу задания
H_zsυ(t) := 2*integral(sin(ω*t)*Re(W_zsυ(ω))/ω, ω = 0 .. ω_end)/π
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# Если изменить параметры регулятора, заданные в расчёте, то переходные процессы изменят свой вид.
# Так настройки регулятора можно изменять много раз, но если учесть, что на реальном объекте переходного процесса иногда приходится ждать более 10 мин., то поиск оптимальных настроек становится не просто утомительным, но иногда и просто невозможным.
# Поэтому, для того чтобы настроить регулятор необходимо применить Теорию Автоматического Управления (ТАУ) и настроить наш регулятор на корневой показатель запаса устойчивости m (обычно говорят "эм малое").
# К вопросу о запасе устойчивости и его связи со степенью затухания:
# Степень затухания Ψ
# Корневой показатель
# запаса устойчивости m
# Частотный показатель
# запаса устойчивости M
# имеют между собой
ΨmM :=
    for i ∈ 0 .. 9
        Ψ[i] ← 0.5 + 0.05*i
        m[i] ← ln(1 - Ψ[i])/(-2*π)
        M[i] ← (1 + m[i]^2)/(2*m[i])
        Result[i, 0] ← Ψ[i]
        Result[i, 1] ← m[i]
        Result[i, 2] ← M[i] ← (1 + m[i]^2)/(2*m[i])
    Result
# Ψ | m | M
ΨmM = [
    0.5, 0.110318, 4.58752;
    0.55, 0.127086, 3.99787;
    0.6, 0.145832, 3.50151;
    0.65, 0.167084, 3.07604;
    0.7, 0.191618, 2.70516;
    0.75, 0.220636, 2.3765;
    0.8, 0.25615, 2.08006;
    0.85, 0.301936, 1.80695;
    0.9, 0.366468, 1.54761;
    0.95, 0.476786, 1.28708
]  # используем 0,211
# используем 0,366
# Самыми распростренными в расчётах и на практике являются степени затухания 0,75 и 0,9; реже 0,95. Соответственно для этих степеней затухания расчитывают коренвой или частотный показатели колебательности.
# Построение линий заданного запаса устойчивости:
# Для того, чтобы построить линии заданноого запаса устойчивости (корневой показатель запаса устойчивости), необходимо немного видоизменить наш объект регулирования и вместо j поставить (j-m), тогда передаточная функция рассматриваемого объекта управления примет вид:
W_obj(m, ω) := k_μ*e^(-τ*(j - m)*ω)/(T_1*(j - m)*ω + 1)^2
# Формулы для построения линий заданного запаса устойчивости (m):
# Определение вещественной
Rμ(m, ω) := Re(W_obj(m, ω))
# и мнимой частей
Iμ(m, ω) := Im(W_obj(m, ω))
# Теперь здесь мы начинаем испоьзовать вместо Tu - Ku, т.к. далее все расчётные формулы выражаются через Ku
Kp(m, ω) := -(Rμ(m, ω) + m*Iμ(m, ω))/(Rμ(m, ω)^2 + Iμ(m, ω)^2)
Ku(m, ω) := -ω*(1 + m^2)*Iμ(m, ω)/(Rμ(m, ω)^2 + Iμ(m, ω)^2)
# Задание дипазона частоты для построения линий заданного запаса устойчивости
ω := 0.0001, 0.0002 .. ω_end
# (ω_end) задана ранее)
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# Методом трассировки находим точки минимума линейного интегрального критерия (всегда пик линий заданного запаса устойчивости).
# Трассировка показывает следующие оптимальные точки для каждого заданного запаса устойчивости:
Kp_0 := 1.225
Ku_0 := 0.16305
Kp_0.221 := 0.63728
Ku_0.221 := 0.071804
Kp_0.366 := 0.45098
Ku_0.366 := 0.047931
# Необходимо теперь эти точки нанести на график:
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# Получается три пары настроечных параметров для трех возможных видов настройки регулятора. Запишем их все в передаточные функции регуляторов.
# Т.к. расчёт линий заданного запаса устойчивости был завершён, теперь необходимо вернуться к привычному виду передаточной функции объекта (см. W_object(ω) - задана ранее)
Wp_0(ω) := Kp_0 + Ku_0/(j*ω)
Wp_0.221(ω) := Kp_0.221 + Ku_0.221/(j*ω)
Wp_0.366(ω) := Kp_0.366 + Ku_0.366/(j*ω)
# Передаточные функции замкнутой системы регулирования для возмущения по каналу регулирующего органа
Wzs_0(ω) := W_object(ω)/(1 + Wp_0(ω)*W_object(ω))
Wzs_0.221(ω) := W_object(ω)/(1 + Wp_0.221(ω)*W_object(ω))
Wzs_0.366(ω) := W_object(ω)/(1 + Wp_0.366(ω)*W_object(ω))
# Построение переходных процессов с помощью Фурье-преобразования:
H_0(t) := 2/π*integral(sin(ω*t)*Re(Wzs_0(ω))/ω, ω = 0 .. ω_end)
H_0.221(t) := 2/π*integral(sin(ω*t)*Re(Wzs_0.221(ω))/ω, ω = 0 .. ω_end)
H_0.366(t) := 2/π*integral(sin(ω*t)*Re(Wzs_0.366(ω))/ω, ω = 0 .. ω_end)
# Построение "кривой разгона" объекта:
H_obj(t) := 2/π*integral(sin(ω*t)*Re(W_object(ω))/ω, ω = 0 .. ω_end)
# Задание временного интервала для расчёта переходных процессов:
t := 0, 0.5 .. 100
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# Анализирем график:
# 1. Кривая разгона получилась идентичной тем, что были построены в самом начале (черный цвет)
# 2. Пик у линии 0,211 (синий) ниже, чем у 0,366 (красный), т.к. у 0,211 Кр выше.
# 3. Линия с корневым показателем колебательности равным 0 не затухает. Т.к. стпень затухания соответствующего преходного процесса равна 0! (процесс не затухает).
# Построение комплексно-частотных характеристик (КЧХ) исследуемых систем регулирования:
I_object(ω) := Im(W_object(ω))
I_0(ω) := Im(Wzs_0(ω))
R_object(ω) := Re(W_object(ω))
R_0(ω) := Re(Wzs_0(ω))
I_0.221(ω) := Im(Wzs_0.221(ω))
I_0.366(ω) := Im(Wzs_0.366(ω))
R_0.221(ω) := Re(Wzs_0.221(ω))
R_0.366(ω) := Re(Wzs_0.366(ω))
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# Анализирем график:
# 1. КЧХ обхекта регулирования не охватывает точку -1,j, т.е. объект обладает самовыравниванием.
# 2. Т.к. линии с заданным запасом устойчивости 0,221 и 0,366 затухают и обладают устойчивостью, то они распололжены преимущественно в III и в IV квадрантах соответственно.
# 3. Линия с запасом устойчивости равным 0 не замыкается в круг и не находится в III и в IV квадрантах, что говорит о том, что с заданными параметрами настройки регулятора систем находится на границе устойчивости.
